*Heading
 Spheroconical nanoindentation 0.05micron depth
** Job name: Indentation_mesh1008 Model name: Model-1
** Generated by: Abaqus/CAE 2017
*Preprint, echo=NO, model=NO, history=NO, contact=NO
** ----------------------------------------------------------------
**
** PART INSTANCE: Spheroconical_indenter-1
**
*System
          0.,          0.,    3.999849,          1.,          0.,    3.999849
          0.,6.12323399573677e-17,    4.999849
*Node
   1326, 6.12230914e-17, -0.999848962,           0.
*Nset, nset=Spheroconical_indenter-1-RefPt_
1326,
*Surface, type=REVOLUTION, name=Spheroconical_indenter-1_analytical-indenter
0., 0., 3.99985, 0., 0., 104.
START,        2.707,        1.293
 LINE,        0.707,       -0.707
 CIRCL,           0., -0.999848988597778,           0.,           0.
** ----------------------------------------------------------------
**
** PART INSTANCE: Specimen-1
**
*System
*Node
      1,   1.41421354,  -1.41421354,           0.
      2,   2.82842708,  -2.82842708,           0.
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*Element, type=C3D8
 1,    1,  100,  526,  107,  118,  536, 1102,  532
 2,  100,  101,  527,  526,  536,  537, 1103, 1102
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*Nset, nset=Specimen-1_Specimen_bulk, generate
    1,  1325,     1
*Elset, elset=Specimen-1_Specimen_bulk, generate
    1,  1008,     1
** Section: Specimen
*Solid Section, elset=Specimen-1_Specimen_bulk, material=Material
,
*System
*Nset, nset=Bottom
    1,    2,    5,    6,   17,   18
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*Elset, elset=Front_half
   1,   2,   3,   4,   5,   6
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*Nset, nset=Shell
   2,   3,   6,   7,  15,  16
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*Nset, nset=Surface
   10,   11,   13,   14,   15,   16
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*Nset, nset=Tip_toe
1326,
*Elset, elset=_surface_S2
 838, 839, 840, 841, 842, 843
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*Elset, elset=_surface_S5
 1000, 1001, 1002, 1006, 1007, 1008
*Surface, type=ELEMENT, name=surface
_surface_S2, S2
_surface_S5, S5
** Constraint: analytical_indenter
*Rigid Body, ref node=Tip_toe, analytical surface=Spheroconical_indenter-1_analytical-indenter
**
** MATERIALS
**
*Material, name=Material
*depvar
     49,
*User Material, constants=2, unsymm
1.,1.
**
** INTERACTION PROPERTIES
**
*Surface Interaction, name=IntProp-1
1.,
*Friction, slip tolerance=0.005
 0.1,
*Surface Behavior, pressure-overclosure=HARD
**
** BOUNDARY CONDITIONS
**
** Name: fixed_bottom Type: Displacement/Rotation
*Boundary
Bottom, 1, 1
Bottom, 2, 2
Bottom, 3, 3
Bottom, 4, 4
Bottom, 5, 5
Bottom, 6, 6
** Name: fixed_shell Type: Displacement/Rotation
*Boundary
Shell, 1, 1
Shell, 2, 2
Shell, 3, 3
Shell, 4, 4
Shell, 5, 5
Shell, 6, 6
**
** INTERACTIONS
**
** Interaction: Int-1
*Contact Pair, interaction=IntProp-1, type=SURFACE TO SURFACE
surface, Spheroconical_indenter-1_analytical-indenter
** ----------------------------------------------------------------
**
** STEP: Indenting
**
*Step, name=Indenting, nlgeom=YES, inc=4000
loading process for indentation
*Static
0.01, 100., 1e-07, 1.
**
** BOUNDARY CONDITIONS
**
** Name: loading Type: Displacement/Rotation
*Boundary
Tip_toe, 1, 1
Tip_toe, 2, 2
Tip_toe, 3, 3, -0.05
Tip_toe, 4, 4
Tip_toe, 5, 5
Tip_toe, 6, 6
**
** CONTROLS
**
*Controls, reset
*Controls, parameters=time incrementation
35, 50, , 50, 28, 5, , 10, , ,
**
** OUTPUT REQUESTS
**
*Restart, write, frequency=0
**
** FIELD OUTPUT: surface_COORD
**
*Output, field, time interval=0.5, time marks=NO
*Node Output
COORD,
**
** FIELD OUTPUT: RF_refpoint
**
*Node Output
RT,
**
** FIELD OUTPUT: Zdisp_refpoint
**
*Node Output
U,
*Output, history, frequency=0
*End Step
** ----------------------------------------------------------------
**
** STEP: Retracting
**
*Step, name=Retracting, nlgeom=YES, inc=1000
unloading plus retracting for indentation
*Static
0.01, 100., 1e-05, 1.
**
** BOUNDARY CONDITIONS
**
** Name: fixed_bottom Type: Displacement/Rotation
*Boundary, op=NEW
Bottom, 1, 1
Bottom, 2, 2
Bottom, 3, 3
Bottom, 4, 4
Bottom, 5, 5
Bottom, 6, 6
** Name: fixed_shell Type: Displacement/Rotation
*Boundary, op=NEW
Shell, 1, 1
Shell, 2, 2
Shell, 3, 3
Shell, 4, 4
Shell, 5, 5
Shell, 6, 6
** Name: loading Type: Displacement/Rotation
*Boundary, op=NEW
** Name: unloading Type: Displacement/Rotation
*Boundary, op=NEW
Tip_toe, 1, 1
Tip_toe, 2, 2
Tip_toe, 3, 3
Tip_toe, 4, 4
Tip_toe, 5, 5
Tip_toe, 6, 6
**
** CONTROLS
**
*Controls, reset
*Controls, parameters=time incrementation
35, 50, , 50, 28, 5, , 10, , ,
**
** OUTPUT REQUESTS
**
*Restart, write, frequency=0
**
** FIELD OUTPUT: surface_COORD
**
*Output, field, time interval=0.5, time marks=NO
*Node Output
COORD,
**
** FIELD OUTPUT: RF_refpoint
**
*Node Output
RT,
**
** FIELD OUTPUT: Zdisp_refpoint
**
*Node Output
U,
*Output, history, frequency=0
*End Step
